f(t, σ, μ) := 1*e^(-1*((ln(t) - μ)/σ)^2/2)/(σ*t*sqrt(2*π))
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F(t, α, b) := integral(f(t, α, b), t = 0 .. t)
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α1(α, b) := integral(t*f(t, α, b), t = 0 .. ∞)
M1(α, b) := α1(α, b)
M2(σ, μ) := e^(μ + σ^2/2)
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α2(α, b) := integral(f(t, α, b)*t^2, t = 0 .. ∞)
D1(α, b) := α2(α, b) - α1(α, b)^2
D2(α, b) := α/b^2
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σ(α, b) := sqrt(D1(α, b))
σ(1, 2) = 15.9692
σ(2, 1) = 147.047
σ(1, 1) = 5.87474
α3(α, b) := integral(f(t, α, b)*t^3, t = 0 .. 200)
μ3(α, b) := 2*α1(α, b)^3 - 3*α1(α, b)*α2(α, b) + α3(α, b)
S(α, b) := μ3(α, b)/sqrt(D1(α, b))^3
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S(1, 1) = 5.3191
S(1, 2) = 2.77188
S(2, 1) = -0.387912
