f(t, α, b) := (b^α/Γ(α))*(t^(α - 1)*e^(-b*t))
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F(t, α, b) := integral(f(t, α, b), t = 0 .. t)
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α1(α, b) := integral(t*f(t, α, b), t = 0 .. 4)
M1(α, b) := α1(α, b)
M2(α, b) := α/b
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α2(α, b) := integral(f(t, α, b)*t^2, t = 0 .. 4)
D1(α, b) := α2(α, b) - α1(α, b)^2
D2(α, b) := α/b^2
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σ(α, b) := sqrt(D1(α, b))
σ(1, 2) = 0.494601
σ(2, 2) = 0.680991
σ(9, 5) = 0.594447
α3(α, b) := integral(f(t, α, b)*t^3, t = 0 .. 4)
μ3(α, b) := 2*α1(α, b)^3 - 3*α1(α, b)*α2(α, b) + α3(α, b)
S(α, b) := μ3(α, b)/sqrt(D1(α, b))^3
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