f(t, α, b) := (b^α/Γ(α))*(t^(α - 1)*e^(-b*t))
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F(t, α, b) := integral(f(t, α, b), t = 0 .. t)
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n := 1000
i := 1 .. n
a := 0
b := 1
y1 := runif(n, a, b)
G1(i, j) := root(F(t, 1, 2) - y1[i], t, 0, 5)
G2(i, j) := root(F(t, 2, 2) - y1[i], t, 0, 5)
G3(i, j) := root(F(t, 9, 5) - y1[i], t, 0, 5)
X12 := matrix(n, 1, G2)
X13 := matrix(n, 1, G3)
X11 := matrix(n, 1, G1)
X22 := sort(X12)
X23 := sort(X13)
X21 := sort(X11)
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D(α, β) := α/β^2
M(α, β) := Γ(α + 1)/(β*Γ(α))
D_empirical(arr, n) := sum(arr[i]^2, i = 0 .. n - 1)/n - (sum(arr[i], i = 0 .. n - 1)/n)^2
M_empirical(arr, n) := sum(arr[i], i = 0 .. n - 1)/n
D1gen := D_empirical(X11, n) = 0.233386
D1formula := D(1, 2) = 0.25
M1gen := M_empirical(X11, n) = 0.489313
M1formula := M(1, 2) = 0.5
D2gen := D_empirical(X12, n) = 0.474865
D2formula := D(2, 2) = 0.5
M2gen := M_empirical(X12, n) = 0.985148
M2formula := M(2, 2) = 1
D3gen := D_empirical(X13, n) = 0.352568
D3formula := D(9, 5) = 0.36
M3gen := M_empirical(X13, n) = 1.78687
M3formula := M(9, 5) = 1.8
bin := 40
j := 1 .. bin + 1
lower1 := floor(min(X11))
lower2 := floor(min(X12))
lower3 := floor(min(X13))
upper1 := ceil(max(X11))
upper2 := ceil(max(X12))
upper3 := ceil(max(X13))
h1 := (upper1 - lower1)/bin
h2 := (upper2 - lower2)/bin
h3 := (upper3 - lower3)/bin
int1[j] := lower1 + h1*j
int2[j] := lower2 + h2*j
int3[j] := lower3 + h3*j
t1 := hist(int1, X11)/(n*h1)
t2 := hist(int2, X12)/(n*h2)
t3 := hist(int3, X13)/(n*h3)
int1 := int1 + h1/2
int2 := int2 + h2/2
int3 := int3 + h3/2
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