f(t, α, b) := (b^α/Γ(α))*(t^(α - 1)*e^(-b*t))
F(t, α, b) := integral(f(t, α, b), t = 0 .. t)
n := 1000
i := 1 .. n
a := 0
b := 1
y1 := runif(n, a, b)
G1(i, j) := root(F(t, 1, 2) - y1[i], t, 0, 5)
G2(i, j) := root(F(t, 2, 2) - y1[i], t, 0, 5)
G3(i, j) := root(F(t, 9, 5) - y1[i], t, 0, 5)
X11 := matrix(n, 1, G1)
X12 := matrix(n, 1, G2)
X13 := matrix(n, 1, G3)
X21 := sort(X11)
X22 := sort(X12)
X23 := sort(X13)
N1(t) :=
    i ← 0
    while t > X21[i]
        i ← i + 1
    n - i
N2(t) :=
    i ← 0
    while t > X22[i]
        i ← i + 1
    n - i
N3(t) :=
    i ← 0
    while t > X23[i]
        i ← i + 1
    n - i
h := 0.1
T1max := round(max(X21)/h, 0)
T2max := round(max(X22)/h, 0)
T3max := round(max(X23)/h, 0)
i := 0 .. T1max
j := 0 .. T2max
k := 0 .. T3max
T1[i] := i*h
T3[k] := k*h
T2[j] := j*h
i := 0 .. T1max - 1
k := 0 .. T3max - 1
j := 0 .. T2max - 1
P1[i] := N1(T1[i])/n
P2[j] := N2(T2[j])/n
P3[k] := N3(T3[k])/n
P1[T1max] := 0
P2[T2max] := 0
P3[T3max] := 0
P(t, α, b) := 1 - F(t, α, b)
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Q1[i] := (n - N1(T1[i]))/n
Q2[i] := (n - N2(T2[i]))/n
Q3[i] := (n - N3(T3[i]))/n
Q(t, a, b) := 1 - P(t, a, b)
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i := 0 .. T1max - 2
j := 0 .. T2max - 2
k := 0 .. T3max - 2
f1[i] := (N1(T1[i]) - N1(T1[i] + h))/(n*h)
f2[j] := (N2(T2[j]) - N2(T2[j] + h))/(n*h)
f3[k] := (N3(T3[k]) - N3(T3[k] + h))/(n*h)
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D3 := D(f, 9, 5, 0, 5)  # error: Эта переменная не определена.
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i := 0 .. T1max - 2
j := 0 .. T2max - 2
k := 0 .. T3max - 2
λ(t, a, b) := f(t, a, b)/P(t, a, b)
λ2[j] := (N2(T2[j]) - N2(T2[j] + h))/(N2(T2[j])*h)
λ3[k] := (N3(T3[k]) - N3(T3[k] + h))/(N3(T3[k])*h)
λ1[i] := (N1(T1[i]) - N1(T1[i] + h))/(N1(T1[i])*h)
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