ORIGIN := 1
n := 21
i := 1 .. n
Ksw := 0.001
E0 := 32
Given
# %%ctrl equals
sum(1/(E0 - (i - 1)) - Ksw*t[i]^2/2, i = 1 .. n) == 0
sum(1/Ksw - (E0 - i + 1)*t[i]^2/2, i = 1 .. n) == 0  # %%Minerr because it returns the approximation it reached(not error as Find)
t := [1; 2; 3; 7; 9; 15; 21; 22; 24; 20; 19; 14; 10; 9; 9; 5; 5; 3; 2; 2; 2]
[Ksw; E0] := Minerr(Ksw, E0) = [0.000395129; 41.9188]
T[i] := sum(t[j], j = 1 .. i)
λnext := Ksw*(E0 - n) = 0.00826562
λ[i] := Ksw*(E0 - (i - 1))*T[i]
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m[i] := 1/λ[i]
mnext := 1/λnext = 120.983
Ksw = 0.000395129
tnext := mnext
P[i] := e^(-Ksw*(E0 - (i - 1))*t[i]^2/2)
Pnext := e^(-Ksw*(E0 - n)*tnext^2/2)
Pnext = 5.35629e-27
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