n := 20
ORIGIN := 1
i := 1 .. n
Ksw := 0.021
t := sort(rexp(n, 0.089))
E0 := 28
Given
sum(1/(E0 - (i - 1)) - Ksw*t[i]^2/2, i = 1 .. n) == 0
sum(1/Ksw - (E0 - i + 1)*t[i]^2/2, i = 1 .. n) == 0
t = [0.129866; 2.19097; 2.74399; 3.84037; 5.70663; 6.02397; 7.09824; 7.35016; 8.95239; 11.7859; 13.3795; 18.4651; 19.64; 20.1603; 21.519; 23.9097; 26.8807; 32.1767; 53.0243; 74.9436]
[Ksw; E0] := Minerr(Ksw, E0) = [0.0616084; 16.9845]
P[i] := e^(-Ksw*(E0 - (i - 1))*t[i]^2/2)
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λ[i] := Ksw*(E0 - (i - 1))*t[i]
λnext := Ksw*(E0 - n) = -0.185778
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λ = [0.13589; 2.15763; 2.53318; 3.30873; 4.56505; 4.44778; 4.80366; 4.52132; 4.95535; 5.79764; 5.75727; 6.80804; 6.03123; 4.94897; 3.95676; 2.9233; 1.63048; -0.0306454; -3.31724; -9.30569]
m[i] := 1/λ[i]
mnext := 1/λnext = -5.38278
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m = [7.35887; 0.463472; 0.394761; 0.302231; 0.219056; 0.224831; 0.208175; 0.221174; 0.201802; 0.172484; 0.173693; 0.146885; 0.165804; 0.202062; 0.252732; 0.342079; 0.613317; -32.6313; -0.301455; -0.107461]
