ORIGIN := 1
n := 13
i := 1 .. n
t := sort(rexp(n, 0.05))
t = [0.231161; 3.89993; 6.83586; 10.7227; 20.9788; 23.8155; 32.8679; 34.9592; 38.3039; 42.5592; 47.8477; 94.3832; 133.4]
Einit := 14
Kinit := 1
Given
sum(1/(Einit - i + 1) - Kinit*t[i], i = 1 .. n) == 0
∞
sum(1/Kinit - (Einit - i + 1)*t[i], i = 1 .. n) == 0
[Kjm; E0] := Find(Kinit, Einit) = [-7.59978e-5; -339.353]
Kjm = -7.59978e-5
E0 = -339.353
E0 := round(E0)
E0 = -339
λ[i] := |Kjm*(E0 - i + 1)|
λ[n + 1] := |Kjm*(E0 - n)|
λ[n + 1] = 0.0267512
P[i] := e^(-λ[i]*t[i])
m[i] := 1/λ[i]
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m[n + 1] := 1/λ[n + 1]
P[n + 1] := e^(-λ[n + 1]*t[n + 1])  # error: Индекс массива является недопустимым для этого массива.
m[n + 1] = 37.3815
P[n + 1] =  # error: Эта переменная не определена.
λ[i] = [0.0257632; 0.0258392; 0.0259152; 0.0259912; 0.0260672; 0.0261432; 0.0262192; 0.0262952; 0.0263712; 0.0264472; 0.0265232; 0.0265992; 0.0266752]
